*Heading
** Job name: Job-1 Model name: Model-1
** Generated by: Abaqus/CAE 2018
*Preprint, echo=NO, model=NO, history=NO, contact=NO
**
** PARTS
**
*Part, name=Part-1
*Node
      1,          0.5,          0.5,           0.
      2,         -0.5,          0.5,           0.
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*Element, type=C3D8R
   1,   109,    31,     2,    12,   244,   166,   137,   147
   2,   114,    26,    27,   113,   249,   161,   162,   248
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*Nset, nset=Set-1, generate
     1,  13635,      1
*Elset, elset=Set-1, generate
    1,  7600,     1
** Section: I-section
*Solid Section, elset=Set-1, material=Material-1
,
*End Part
**
**
** ASSEMBLY
**
*Assembly, name=Assembly
**
*Instance, name=Part-1-1, part=Part-1
*End Instance
**
*Nset, nset="loading_note=", instance=Part-1-1
 13624,
*Nset, nset=wall-0, instance=Part-1-1
 1,
*Nset, nset=wall-1, instance=Part-1-1
 2,
*Nset, nset=wall-2, instance=Part-1-1
 3,
*Nset, nset=wall-3, instance=Part-1-1
 4,
*Nset, nset=wall-4, instance=Part-1-1
 5,
*Nset, nset=wall-5, instance=Part-1-1
 6,
*Nset, nset=wall-6, instance=Part-1-1
 7,
*Nset, nset=wall-7, instance=Part-1-1
 8,
*Nset, nset=wall-8, instance=Part-1-1
 9,
*Nset, nset=wall-9, instance=Part-1-1
 10,
*Nset, nset=wall-10, instance=Part-1-1
 11,
*Nset, nset=wall-11, instance=Part-1-1
 12,
*Nset, nset=wall-12, instance=Part-1-1
 13,
*Nset, nset=wall-13, instance=Part-1-1
 14,
*Nset, nset=wall-14, instance=Part-1-1
 15,
*Nset, nset=wall-15, instance=Part-1-1
 16,
*Nset, nset=wall-16, instance=Part-1-1
 17,
*Nset, nset=wall-17, instance=Part-1-1
 18,
*Nset, nset=wall-18, instance=Part-1-1
 19,
*Nset, nset=wall-19, instance=Part-1-1
 20,
*Nset, nset=wall-20, instance=Part-1-1
 21,
*Nset, nset=wall-21, instance=Part-1-1
 22,
*Nset, nset=wall-22, instance=Part-1-1
 23,
*Nset, nset=wall-23, instance=Part-1-1
 24,
*Nset, nset=wall-24, instance=Part-1-1
 25,
*Nset, nset=wall-25, instance=Part-1-1
 26,
*Nset, nset=wall-26, instance=Part-1-1
 27,
*Nset, nset=wall-27, instance=Part-1-1
 28,
*Nset, nset=wall-28, instance=Part-1-1
 29,
*Nset, nset=wall-29, instance=Part-1-1
 30,
*Nset, nset=wall-30, instance=Part-1-1
 31,
*Nset, nset=wall-31, instance=Part-1-1
 32,
*Nset, nset=wall-32, instance=Part-1-1
 33,
*Nset, nset=wall-33, instance=Part-1-1
 34,
*Nset, nset=wall-34, instance=Part-1-1
 35,
*Nset, nset=wall-35, instance=Part-1-1
 36,
*Nset, nset=wall-36, instance=Part-1-1
 37,
*Nset, nset=wall-37, instance=Part-1-1
 38,
*Nset, nset=wall-38, instance=Part-1-1
 39,
*Nset, nset=wall-39, instance=Part-1-1
 40,
*Nset, nset=wall-40, instance=Part-1-1
 41,
*Nset, nset=wall-41, instance=Part-1-1
 42,
*Nset, nset=wall-42, instance=Part-1-1
 43,
*Nset, nset=wall-43, instance=Part-1-1
 44,
*Nset, nset=wall-44, instance=Part-1-1
 45,
*Nset, nset=wall-45, instance=Part-1-1
 46,
*Nset, nset=wall-46, instance=Part-1-1
 47,
*Nset, nset=wall-47, instance=Part-1-1
 48,
*Nset, nset=wall-48, instance=Part-1-1
 49,
*Nset, nset=wall-49, instance=Part-1-1
 50,
*Nset, nset=wall-50, instance=Part-1-1
 51,
*Nset, nset=wall-51, instance=Part-1-1
 52,
*Nset, nset=wall-52, instance=Part-1-1
 53,
*Nset, nset=wall-53, instance=Part-1-1
 54,
*Nset, nset=wall-54, instance=Part-1-1
 55,
*Nset, nset=wall-55, instance=Part-1-1
 56,
*Nset, nset=wall-56, instance=Part-1-1
 57,
*Nset, nset=wall-57, instance=Part-1-1
 58,
*Nset, nset=wall-58, instance=Part-1-1
 59,
*Nset, nset=wall-59, instance=Part-1-1
 60,
*Nset, nset=wall-60, instance=Part-1-1
 61,
*Nset, nset=wall-61, instance=Part-1-1
 62,
*Nset, nset=wall-62, instance=Part-1-1
 63,
*Nset, nset=wall-63, instance=Part-1-1
 64,
*Nset, nset=wall-64, instance=Part-1-1
 65,
*Nset, nset=wall-65, instance=Part-1-1
 66,
*Nset, nset=wall-66, instance=Part-1-1
 67,
*Nset, nset=wall-67, instance=Part-1-1
 68,
*Nset, nset=wall-68, instance=Part-1-1
 69,
*Nset, nset=wall-69, instance=Part-1-1
 70,
*Nset, nset=wall-70, instance=Part-1-1
 71,
*Nset, nset=wall-71, instance=Part-1-1
 72,
*Nset, nset=wall-72, instance=Part-1-1
 73,
*Nset, nset=wall-73, instance=Part-1-1
 74,
*Nset, nset=wall-74, instance=Part-1-1
 75,
*Nset, nset=wall-75, instance=Part-1-1
 76,
*Nset, nset=wall-76, instance=Part-1-1
 77,
*Nset, nset=wall-77, instance=Part-1-1
 78,
*Nset, nset=wall-78, instance=Part-1-1
 79,
*Nset, nset=wall-79, instance=Part-1-1
 80,
*Nset, nset=wall-80, instance=Part-1-1
 81,
*Nset, nset=wall-81, instance=Part-1-1
 82,
*Nset, nset=wall-82, instance=Part-1-1
 83,
*Nset, nset=wall-83, instance=Part-1-1
 84,
*Nset, nset=wall-84, instance=Part-1-1
 85,
*Nset, nset=wall-85, instance=Part-1-1
 86,
*Nset, nset=wall-86, instance=Part-1-1
 87,
*Nset, nset=wall-87, instance=Part-1-1
 88,
*Nset, nset=wall-88, instance=Part-1-1
 89,
*Nset, nset=wall-89, instance=Part-1-1
 90,
*Nset, nset=wall-90, instance=Part-1-1
 91,
*Nset, nset=wall-91, instance=Part-1-1
 92,
*Nset, nset=wall-92, instance=Part-1-1
 93,
*Nset, nset=wall-93, instance=Part-1-1
 94,
*Nset, nset=wall-94, instance=Part-1-1
 95,
*Nset, nset=wall-95, instance=Part-1-1
 96,
*Nset, nset=wall-96, instance=Part-1-1
 97,
*Nset, nset=wall-97, instance=Part-1-1
 98,
*Nset, nset=wall-98, instance=Part-1-1
 99,
*Nset, nset=wall-99, instance=Part-1-1
 100,
*Nset, nset=wall-100, instance=Part-1-1
 101,
*Nset, nset=wall-101, instance=Part-1-1
 102,
*Nset, nset=wall-102, instance=Part-1-1
 103,
*Nset, nset=wall-103, instance=Part-1-1
 104,
*Nset, nset=wall-104, instance=Part-1-1
 105,
*Nset, nset=wall-105, instance=Part-1-1
 106,
*Nset, nset=wall-106, instance=Part-1-1
 107,
*Nset, nset=wall-107, instance=Part-1-1
 108,
*Nset, nset=wall-108, instance=Part-1-1
 109,
*Nset, nset=wall-109, instance=Part-1-1
 110,
*Nset, nset=wall-110, instance=Part-1-1
 111,
*Nset, nset=wall-111, instance=Part-1-1
 112,
*Nset, nset=wall-112, instance=Part-1-1
 113,
*Nset, nset=wall-113, instance=Part-1-1
 114,
*Nset, nset=wall-114, instance=Part-1-1
 115,
*Nset, nset=wall-115, instance=Part-1-1
 116,
*Nset, nset=wall-116, instance=Part-1-1
 117,
*Nset, nset=wall-117, instance=Part-1-1
 118,
*Nset, nset=wall-118, instance=Part-1-1
 119,
*Nset, nset=wall-119, instance=Part-1-1
 120,
*Nset, nset=wall-120, instance=Part-1-1
 121,
*Nset, nset=wall-121, instance=Part-1-1
 122,
*Nset, nset=wall-122, instance=Part-1-1
 123,
*Nset, nset=wall-123, instance=Part-1-1
 124,
*Nset, nset=wall-124, instance=Part-1-1
 125,
*Nset, nset=wall-125, instance=Part-1-1
 126,
*Nset, nset=wall-126, instance=Part-1-1
 127,
*Nset, nset=wall-127, instance=Part-1-1
 128,
*Nset, nset=wall-128, instance=Part-1-1
 129,
*Nset, nset=wall-129, instance=Part-1-1
 130,
*Nset, nset=wall-130, instance=Part-1-1
 131,
*Nset, nset=wall-131, instance=Part-1-1
 132,
*Nset, nset=wall-132, instance=Part-1-1
 133,
*Nset, nset=wall-133, instance=Part-1-1
 134,
*Nset, nset=wall-134, instance=Part-1-1
 135,
*Nset, nset=wall_nodes_all, instance=Part-1-1, generate
   1,  135,    1
** Constraint: moment_x_u3
*Equation
134
wall-1, 3, 1.
wall-0, 3, 1.
wall-2, 3, 0.94
wall-3, 3, 0.94
wall-4, 3, 0.06
wall-5, 3, 0.06
wall-6, 3, 0.
wall-7, 3, 0.
wall-8, 3, 0.06
wall-9, 3, 0.06
wall-10, 3, 0.94
wall-11, 3, 0.94
wall-12, 3, 1.
wall-13, 3, 1.
wall-14, 3, 1.
wall-15, 3, 1.
wall-16, 3, 1.
wall-17, 3, 1.
wall-18, 3, 1.
wall-19, 3, 1.
wall-20, 3, 1.
wall-21, 3, 1.
wall-22, 3, 1.
wall-23, 3, 1.
wall-24, 3, 1.
wall-25, 3, 1.
wall-26, 3, 1.
wall-27, 3, 1.
wall-28, 3, 1.
wall-29, 3, 1.
wall-30, 3, 1.
wall-31, 3, 0.94
wall-32, 3, 0.94
wall-33, 3, 0.94
wall-34, 3, 0.94
wall-35, 3, 0.94
wall-36, 3, 0.94
wall-37, 3, 0.94
wall-38, 3, 0.94
wall-39, 3, 0.108889
wall-40, 3, 0.157778
wall-41, 3, 0.206667
wall-42, 3, 0.255556
wall-43, 3, 0.304444
wall-44, 3, 0.353333
wall-45, 3, 0.402222
wall-46, 3, 0.451111
wall-47, 3, 0.5
wall-48, 3, 0.548889
wall-49, 3, 0.597778
wall-50, 3, 0.646667
wall-51, 3, 0.695556
wall-52, 3, 0.744444
wall-53, 3, 0.793333
wall-54, 3, 0.842222
wall-55, 3, 0.891111
wall-56, 3, 0.06
wall-57, 3, 0.06
wall-58, 3, 0.06
wall-59, 3, 0.06
wall-60, 3, 0.06
wall-61, 3, 0.06
wall-62, 3, 0.06
wall-63, 3, 0.06
wall-64, 3, 0.
wall-65, 3, 0.
wall-66, 3, 0.
wall-67, 3, 0.
wall-68, 3, 0.
wall-69, 3, 0.
wall-70, 3, 0.
wall-71, 3, 0.
wall-72, 3, 0.
wall-73, 3, 0.
wall-75, 3, 0.
wall-76, 3, 0.
wall-77, 3, 0.
wall-78, 3, 0.
wall-79, 3, 0.
wall-80, 3, 0.
wall-81, 3, 0.
wall-82, 3, 0.
wall-83, 3, 0.06
wall-84, 3, 0.06
wall-85, 3, 0.06
wall-86, 3, 0.06
wall-87, 3, 0.06
wall-88, 3, 0.06
wall-89, 3, 0.06
wall-90, 3, 0.06
wall-91, 3, 0.891111
wall-92, 3, 0.842222
wall-93, 3, 0.793333
wall-94, 3, 0.744444
wall-95, 3, 0.695556
wall-96, 3, 0.646667
wall-97, 3, 0.597778
wall-98, 3, 0.548889
wall-99, 3, 0.5
wall-100, 3, 0.451111
wall-101, 3, 0.402222
wall-102, 3, 0.353333
wall-103, 3, 0.304444
wall-104, 3, 0.255556
wall-105, 3, 0.206667
wall-106, 3, 0.157778
wall-107, 3, 0.108889
wall-108, 3, 0.94
wall-109, 3, 0.94
wall-110, 3, 0.94
wall-111, 3, 0.94
wall-112, 3, 0.94
wall-113, 3, 0.94
wall-114, 3, 0.94
wall-115, 3, 0.94
wall-116, 3, 0.0574217
wall-117, 3, 0.891883
wall-118, 3, 0.451631
wall-119, 3, 0.158208
wall-120, 3, 0.304965
wall-121, 3, 0.353675
wall-122, 3, 0.402362
wall-123, 3, 0.500342
wall-124, 3, 0.549202
wall-125, 3, 0.598086
wall-126, 3, 0.646977
wall-127, 3, 0.695865
wall-128, 3, 0.744761
wall-129, 3, 0.793685
wall-130, 3, 0.842405
wall-131, 3, 0.2559
wall-132, 3, 0.206793
wall-133, 3, 0.108545
wall-134, 3, 0.942871
** Constraint: moment_y_u3
*Equation
133
wall-2, 3, -0.49
wall-0, 3, -0.55
wall-3, 3, -0.95
wall-4, 3, -0.07
wall-5, 3, 0.39
wall-6, 3, 0.45
wall-7, 3, -0.55
wall-8, 3, -0.61
wall-9, 3, -0.15
wall-10, 3, -1.03
wall-11, 3, -1.49
wall-12, 3, -0.6
wall-13, 3, -0.65
wall-14, 3, -0.7
wall-15, 3, -0.75
wall-16, 3, -0.8
wall-17, 3, -0.85
wall-18, 3, -0.9
wall-19, 3, -0.95
wall-20, 3, -1.
wall-21, 3, -1.05
wall-22, 3, -1.1
wall-23, 3, -1.15
wall-24, 3, -1.2
wall-25, 3, -1.25
wall-26, 3, -1.3
wall-27, 3, -1.35
wall-28, 3, -1.4
wall-29, 3, -1.45
wall-30, 3, -1.5
wall-31, 3, -0.898889
wall-32, 3, -0.847778
wall-33, 3, -0.796667
wall-34, 3, -0.745556
wall-35, 3, -0.694444
wall-36, 3, -0.643333
wall-37, 3, -0.592222
wall-38, 3, -0.541111
wall-39, 3, -0.118889
wall-40, 3, -0.167778
wall-41, 3, -0.216667
wall-42, 3, -0.265556
wall-43, 3, -0.314444
wall-44, 3, -0.363333
wall-45, 3, -0.412222
wall-46, 3, -0.461111
wall-47, 3, -0.51
wall-48, 3, -0.558889
wall-49, 3, -0.607778
wall-50, 3, -0.656667
wall-51, 3, -0.705556
wall-52, 3, -0.754444
wall-53, 3, -0.803333
wall-54, 3, -0.852222
wall-55, 3, -0.901111
wall-56, 3, 0.338889
wall-57, 3, 0.287778
wall-58, 3, 0.236667
wall-59, 3, 0.185556
wall-60, 3, 0.134444
wall-61, 3, 0.0833333
wall-62, 3, 0.0322222
wall-63, 3, -0.0188889
wall-64, 3, -0.5
wall-65, 3, -0.45
wall-66, 3, -0.4
wall-67, 3, -0.35
wall-68, 3, -0.3
wall-69, 3, -0.25
wall-70, 3, -0.2
wall-71, 3, -0.15
wall-72, 3, -0.1
wall-73, 3, -0.05
wall-75, 3, 0.05
wall-76, 3, 0.1
wall-77, 3, 0.15
wall-78, 3, 0.2
wall-79, 3, 0.25
wall-80, 3, 0.3
wall-81, 3, 0.35
wall-82, 3, 0.4
wall-83, 3, -0.201111
wall-84, 3, -0.252222
wall-85, 3, -0.303333
wall-86, 3, -0.354444
wall-87, 3, -0.405556
wall-88, 3, -0.456667
wall-89, 3, -0.507778
wall-90, 3, -0.558889
wall-91, 3, -0.981111
wall-92, 3, -0.932222
wall-93, 3, -0.883333
wall-94, 3, -0.834444
wall-95, 3, -0.785556
wall-96, 3, -0.736667
wall-97, 3, -0.687778
wall-98, 3, -0.638889
wall-99, 3, -0.59
wall-100, 3, -0.541111
wall-101, 3, -0.492222
wall-102, 3, -0.443333
wall-103, 3, -0.394444
wall-104, 3, -0.345556
wall-105, 3, -0.296667
wall-106, 3, -0.247778
wall-107, 3, -0.198889
wall-108, 3, -1.43889
wall-109, 3, -1.38778
wall-110, 3, -1.33667
wall-111, 3, -1.28556
wall-112, 3, -1.23444
wall-113, 3, -1.18333
wall-114, 3, -1.13222
wall-115, 3, -1.08111
wall-116, 3, -0.10793
wall-117, 3, -0.942436
wall-118, 3, -0.502905
wall-119, 3, -0.209389
wall-120, 3, -0.356234
wall-121, 3, -0.404668
wall-122, 3, -0.453013
wall-123, 3, -0.551335
wall-124, 3, -0.600114
wall-125, 3, -0.648974
wall-126, 3, -0.697853
wall-127, 3, -0.746741
wall-128, 3, -0.795615
wall-129, 3, -0.84444
wall-130, 3, -0.89278
wall-131, 3, -0.306907
wall-132, 3, -0.257423
wall-133, 3, -0.159019
wall-134, 3, -0.992987
** Constraint: sum_of_u3
*Equation
135
wall-74, 3, 1.
wall-1, 3, 1.
wall-2, 3, 1.
wall-3, 3, 1.
wall-4, 3, 1.
wall-5, 3, 1.
wall-6, 3, 1.
wall-7, 3, 1.
wall-8, 3, 1.
wall-9, 3, 1.
wall-10, 3, 1.
wall-11, 3, 1.
wall-12, 3, 1.
wall-13, 3, 1.
wall-14, 3, 1.
wall-15, 3, 1.
wall-16, 3, 1.
wall-17, 3, 1.
wall-18, 3, 1.
wall-19, 3, 1.
wall-20, 3, 1.
wall-21, 3, 1.
wall-22, 3, 1.
wall-23, 3, 1.
wall-24, 3, 1.
wall-25, 3, 1.
wall-26, 3, 1.
wall-27, 3, 1.
wall-28, 3, 1.
wall-29, 3, 1.
wall-30, 3, 1.
wall-31, 3, 1.
wall-32, 3, 1.
wall-33, 3, 1.
wall-34, 3, 1.
wall-35, 3, 1.
wall-36, 3, 1.
wall-37, 3, 1.
wall-38, 3, 1.
wall-39, 3, 1.
wall-40, 3, 1.
wall-41, 3, 1.
wall-42, 3, 1.
wall-43, 3, 1.
wall-44, 3, 1.
wall-45, 3, 1.
wall-46, 3, 1.
wall-47, 3, 1.
wall-48, 3, 1.
wall-49, 3, 1.
wall-50, 3, 1.
wall-51, 3, 1.
wall-52, 3, 1.
wall-53, 3, 1.
wall-54, 3, 1.
wall-55, 3, 1.
wall-56, 3, 1.
wall-57, 3, 1.
wall-58, 3, 1.
wall-59, 3, 1.
wall-60, 3, 1.
wall-61, 3, 1.
wall-62, 3, 1.
wall-63, 3, 1.
wall-64, 3, 1.
wall-65, 3, 1.
wall-66, 3, 1.
wall-67, 3, 1.
wall-68, 3, 1.
wall-69, 3, 1.
wall-70, 3, 1.
wall-71, 3, 1.
wall-72, 3, 1.
wall-73, 3, 1.
wall-0, 3, 1.
wall-75, 3, 1.
wall-76, 3, 1.
wall-77, 3, 1.
wall-78, 3, 1.
wall-79, 3, 1.
wall-80, 3, 1.
wall-81, 3, 1.
wall-82, 3, 1.
wall-83, 3, 1.
wall-84, 3, 1.
wall-85, 3, 1.
wall-86, 3, 1.
wall-87, 3, 1.
wall-88, 3, 1.
wall-89, 3, 1.
wall-90, 3, 1.
wall-91, 3, 1.
wall-92, 3, 1.
wall-93, 3, 1.
wall-94, 3, 1.
wall-95, 3, 1.
wall-96, 3, 1.
wall-97, 3, 1.
wall-98, 3, 1.
wall-99, 3, 1.
wall-100, 3, 1.
wall-101, 3, 1.
wall-102, 3, 1.
wall-103, 3, 1.
wall-104, 3, 1.
wall-105, 3, 1.
wall-106, 3, 1.
wall-107, 3, 1.
wall-108, 3, 1.
wall-109, 3, 1.
wall-110, 3, 1.
wall-111, 3, 1.
wall-112, 3, 1.
wall-113, 3, 1.
wall-114, 3, 1.
wall-115, 3, 1.
wall-116, 3, 1.
wall-117, 3, 1.
wall-118, 3, 1.
wall-119, 3, 1.
wall-120, 3, 1.
wall-121, 3, 1.
wall-122, 3, 1.
wall-123, 3, 1.
wall-124, 3, 1.
wall-125, 3, 1.
wall-126, 3, 1.
wall-127, 3, 1.
wall-128, 3, 1.
wall-129, 3, 1.
wall-130, 3, 1.
wall-131, 3, 1.
wall-132, 3, 1.
wall-133, 3, 1.
wall-134, 3, 1.
*End Assembly
**
** MATERIALS
**
*Material, name=Material-1
*Elastic
 2.1e+11, 0.3
**
** BOUNDARY CONDITIONS
**
** Name: BC-1 Type: Displacement/Rotation
*Boundary
wall_nodes_all, 1, 1
wall_nodes_all, 2, 2
wall_nodes_all, 4, 4
wall_nodes_all, 5, 5
wall_nodes_all, 6, 6
** ----------------------------------------------------------------
**
** STEP: loading
**
*Step, name=loading, nlgeom=NO
*Static
1., 1., 1e-05, 1.
**
** LOADS
**
** Name: Load-1   Type: Concentrated force
*Cload
"loading_note=", 2, -10.
**
** OUTPUT REQUESTS
**
*Restart, write, frequency=0
**
** FIELD OUTPUT: F-Output-1
**
*Output, field, variable=PRESELECT
**
** HISTORY OUTPUT: H-Output-1
**
*Output, history, variable=PRESELECT
*End Step
