*Heading
** Job name: Job-1 Model name: Model-1
** Generated by: Abaqus/CAE 2018
*Preprint, echo=NO, model=NO, history=NO, contact=NO
**
** PARTS
**
*Part, name=Part-1
*Node
      1, 0.0199999996,          0.5,           3.
      2, 0.0199999996,  0.449999988,           3.
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*Element, type=C3D8R
   1, 1282, 1283, 1304, 1303,    1,    2,   23,   22
   2, 1283, 1284, 1305, 1304,    2,    3,   24,   23
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*Nset, nset=whole_plate, generate
    1,  2562,     1
*Elset, elset=whole_plate, generate
    1,  1200,     1
*Orientation, name=Ori-1
1., 0., 0., 0., 1., 0.
1, 0.
** Section: plate_section
*Solid Section, elset=whole_plate, orientation=Ori-1, material=variable_lambda
,
*End Part
**
**
** ASSEMBLY
**
*Assembly, name=Assembly
**
*Instance, name=Part-1-1, part=Part-1
*End Instance
**
*Elset, elset=_loading_surface_S5, internal, instance=Part-1-1, generate
 1181,  1200,     1
*Surface, type=ELEMENT, name=loading_surface
_loading_surface_S5, S5
*Elset, elset=_loading_surface_lower_S5, internal, instance=Part-1-1, generate
 1191,  1200,     1
*Surface, type=ELEMENT, name=loading_surface_lower
_loading_surface_lower_S5, S5
*Elset, elset=_loading_surface_upper_S5, internal, instance=Part-1-1, generate
 1181,  1190,     1
*Surface, type=ELEMENT, name=loading_surface_upper
_loading_surface_upper_S5, S5
*End Assembly
**
** MATERIALS
**
*Material, name=variable_lambda
*Elastic, type=ENGINEERING CONSTANTS
 2e+07,  2e+07,  2e+07,    0.3,    0.3,    0.3,  1e+07, 10000.
100000.,
** ----------------------------------------------------------------
**
** STEP: loading
**
*Step, name=loading, nlgeom=NO
*Static
1., 1., 1e-05, 1.
**
** LOADS
**
** Name: Load-1   Type: Pressure Using Field: AnalyticalField-2
*Dload, op=NEW
Part-1-1.1181, P5, -0.9
Part-1-1.1182, P5, -0.7
Part-1-1.1183, P5, -0.5
Part-1-1.1184, P5, -0.3
Part-1-1.1185, P5, -0.1
Part-1-1.1186, P5, 0.1
Part-1-1.1187, P5, 0.3
Part-1-1.1188, P5, 0.5
Part-1-1.1189, P5, 0.7
Part-1-1.1190, P5, 0.9
** Name: Load-2   Type: Pressure Using Field: AnalyticalField-3
*Dload, op=NEW
Part-1-1.1191, P5, 0.9
Part-1-1.1192, P5, 0.7
Part-1-1.1193, P5, 0.5
Part-1-1.1194, P5, 0.3
Part-1-1.1195, P5, 0.1
Part-1-1.1196, P5, -0.1
Part-1-1.1197, P5, -0.3
Part-1-1.1198, P5, -0.5
Part-1-1.1199, P5, -0.7
Part-1-1.1200, P5, -0.9
**
** OUTPUT REQUESTS
**
*Restart, write, frequency=0
**
** FIELD OUTPUT: F-Output-1
**
*Output, field
*Node Output
CF, COORD, RF, U
*Element Output, directions=YES
EEQUT, LE, MVF, PE, PEEQ, PEMAG, S, SEQUT, TE, TEEQ, TEVOL
*Contact Output
CDISP, CSTRESS
**
** HISTORY OUTPUT: H-Output-1
**
*Output, history, variable=PRESELECT
*End Step
